*Heading
** Job name: fCPS4 Model name: fine_CPS4
** Generated by: Abaqus/CAE Student Edition 2021
*Preprint, echo=NO, model=NO, history=NO, contact=NO
** ----------------------------------------------------------------
**
** PART INSTANCE: Part-1-1
**
*Node
      1,   2.12968779,  0.748563945
      2,   1.78302097,  0.453000009
      3,           2.,           0.
      4,   2.41700006,           0.
      5,   1.16499996,  0.812830687
      6,   1.36939037,   1.30441773
      7,           0.,   1.58299994
      8,           0.,           1.
      9,   2.83276558,   1.34800005
     10,         3.25,           0.
     11,   1.78299999,   2.29920578
     12,           0.,         2.75
     13,   1.95635438,  0.600781977
     14,   1.93760836,   0.24782756
     15,   2.20849991,           0.
     16,   2.33895946,  0.399010003
     17,   1.26719522,   1.05862427
     18,  0.699454725,   1.51526558
     19,           0.,   1.29149997
     20,  0.590530932,  0.955415249
     21,   2.48122668,   1.04828203
     22,   2.83349991,           0.
     23,   3.14145494,  0.704780996
     24,   1.57619524,   1.80181181
     25,   1.78156114,   1.06977248
     26,   2.36494803,   1.88628185
     27,  0.920210361,   2.63746476
     28,           0.,   2.16650009
     29,   1.49321365,   0.66526556
     30,   2.13828373,  0.323418766
     31,  0.644992828,   1.23534048
     32,    2.7402072,  0.551895499
     33,   2.07325459,   1.47802711
     34,  0.809832573,   2.07636523
     35,   1.63738739,  0.867518961
*Element, type=CPS4R
1,  1, 13, 30, 16
2, 13,  2, 14, 30
3, 16, 30, 15,  4
4, 30, 14,  3, 15
5,  5, 17, 31, 20
6, 17,  6, 18, 31
7, 20, 31, 19,  8
8, 31, 18,  7, 19
 9,  9, 21, 32, 23
10, 21,  1, 16, 32
11, 23, 32, 22, 10
12, 32, 16,  4, 22
13, 11, 24, 33, 26
14, 24,  6, 25, 33
15, 26, 33, 21,  9
16, 33, 25,  1, 21
17,  6, 24, 34, 18
18, 24, 11, 27, 34
19, 18, 34, 28,  7
20, 34, 27, 12, 28
21,  6, 17, 35, 25
22, 17,  5, 29, 35
23, 25, 35, 13,  1
24, 35, 29,  2, 13
*Nset, nset=Part-1-1_Set-2, generate
  1,  35,   1
*Elset, elset=Part-1-1_Set-2, generate
  1,  24,   1
** Section: Section-1
*Solid Section, elset=Part-1-1_Set-2, material=Material-1
0.1,
*System
*Nset, nset=Set-1
  7,  8, 12, 19, 28
*Elset, elset=Set-1
  7,  8, 19, 20
*Nset, nset=Set-2
  3,  4, 10, 15, 22
*Elset, elset=Set-2
  3,  4, 11, 12
*Elset, elset=_Surf-1_S4, generate
  9,  15,   2
*Elset, elset=_Surf-1_S2
 18, 20
*Surface, type=ELEMENT, name=Surf-1
_Surf-1_S4, S4
_Surf-1_S2, S2
**
** MATERIALS
**
*Material, name=Material-1
*Elastic
210000., 0.3
** ----------------------------------------------------------------
**
** STEP: Step-1
**
*Step, name=Step-1, nlgeom=NO
*Static
1., 1., 1e-05, 1.
**
** BOUNDARY CONDITIONS
**
** Name: BC-1 Type: �ψ�/��]
*Boundary
Set-1, 1, 1
** Name: BC-2 Type: �ψ�/��]
*Boundary
Set-2, 2, 2
**
** LOADS
**
** Name: Load-1   Type: Pressure
*Dsload
Surf-1, P, -10.
**
** OUTPUT REQUESTS
**
*Restart, write, frequency=0
**
*NODE PRINT, NSET=Nall
U
*EL PRINT, ELSET=Eall
S
*NODE FILE
U
*EL FILE
S
*End Step
