*Heading
** Job name: fCPS6 Model name: fine_CPS6
** Generated by: Abaqus/CAE Student Edition 2021
*Preprint, echo=NO, model=NO, history=NO, contact=NO
** ----------------------------------------------------------------
**
** PART INSTANCE: Part-1-1
**
*Node
      1,   2.12968779,  0.748563945
      2,   1.78302097,  0.453000009
      3,           2.,           0.
      4,   2.41700006,           0.
      5,   1.16499996,  0.812830687
      6,   1.36939037,   1.30441773
      7,           0.,   1.58299994
      8,           0.,           1.
      9,   2.83276558,   1.34800005
     10,         3.25,           0.
     11,   1.78299999,   2.29920578
     12,           0.,         2.75
     13,   1.95635438,  0.600781977
     14,   1.93760836,   0.24782756
     15,   2.20849991,           0.
     16,   2.33895946,  0.399010003
     17,   1.26719522,   1.05862427
     18,  0.699454725,   1.51526558
     19,           0.,   1.29149997
     20,  0.590530932,  0.955415249
     21,   2.48122668,   1.04828203
     22,   2.83349991,           0.
     23,   3.14145494,  0.704780996
     24,   1.57619524,   1.80181181
     25,   1.78156114,   1.06977248
     26,   2.36494803,   1.88628185
     27,  0.920210361,   2.63746476
     28,           0.,   2.16650009
     29,   1.49321365,   0.66526556
     30,   2.13828373,  0.323418766
     31,  0.644992828,   1.23534048
     32,    2.7402072,  0.551895499
     33,   2.07325459,   1.47802711
     34,  0.809832573,   2.07636523
     35,   1.63738739,  0.867518961
     36,   2.04302096,  0.674672961
     37,   2.04731894,  0.462100387
     38,   2.14765692,   0.49989599
     39,   2.23862171,  0.361214399
     40,   2.25020337,  0.577865005
     41,   1.86968768,  0.526890993
     42,   1.87159467,  0.352538496
     43,   1.96065235,  0.388209403
     44,   2.03794599,  0.285623163
     45,   2.17339182,  0.161709383
     46,   2.27764177,  0.161709383
     47,   2.31274986,           0.
     48,   2.39741039,  0.201135173
     49,   1.98434079,  0.124891631
     50,   2.07305408,   0.12391378
     51,   2.10424995,           0.
     52,   1.21609759,  0.935727477
     53,  0.956094027,   1.14698243
     54,  0.928863049,   1.00701976
     55,   0.61776185,   1.09537792
     56,  0.889270782,   0.89571166
     57,   1.31829286,   1.18152106
     58,   1.04687166,   1.42680883
     59,   1.00719166,    1.2698791
     60,  0.672223806,   1.37530303
     61,  0.322496414,   1.26342022
     62,  0.322496414,    1.1176703
     63,           0.,   1.14575005
     64,  0.298612624,  0.988790989
     65,  0.353529572,   1.56597483
     66,  0.349727362,   1.40338278
     67,           0.,   1.43725002
     68,   2.65699625,   1.19814098
     69,   2.81134081,  0.876531482
     70,   3.01119447,   1.03466594
     71,   2.61071682,  0.800088763
     72,   2.94083118,  0.628338218
     73,   2.30545712,  0.898422956
     74,   2.43494749,  0.650229692
     75,   2.53958321,  0.475452751
     76,    2.9951036,   0.27594775
     77,   3.22274947,  0.355370194
     78,   2.78685355,   0.27594775
     79,   3.04174995,           0.
     80,    2.5862298,  0.199505001
     81,   2.62524986,           0.
     82,   1.67959762,   2.05050874
     83,   1.97057164,   1.84404683
     84,   2.08827782,   2.10717726
     85,   1.82472491,   1.63991952
     86,   2.21910143,   1.68215442
     87,   1.47279274,   1.55311477
     88,   1.72132254,   1.39122248
     89,   1.58562696,   1.19474387
     90,   1.92740786,   1.27389979
     91,   2.45301008,   1.41301358
     92,   2.61824918,   1.62920785
     93,   2.27724075,   1.26315451
     94,   2.13139391,   1.05902719
     95,   1.97093856,   0.91628772
     96,   1.13782501,    1.6585387
     97,   1.19301391,   1.93908858
     98,  0.754643679,   1.79581547
     99,   1.29641628,   2.18778563
    100,   1.36630476,   2.49518013
    101,  0.865021467,     2.356915
    102,  0.404916286,   1.82968259
    103,  0.404916286,   2.12143278
    104,           0.,   1.87475002
    105,  0.460105181,   2.40198231
    106,  0.464885771,    2.7217207
    107,           0.,   2.45825005
    108,   1.45229125,  0.963071585
    109,   1.52437818,   1.06419837
    110,   1.70947433,  0.968645692
    111,   1.33727348,  0.743589222
    112,   1.40119362,  0.840174794
    113,   1.56530046,  0.766392231
    114,   1.79687095,  0.734150469
    115,   1.88353753,  0.808041453
    116,   1.65181267,  0.563807368
    117,   1.72478402,  0.633023739
*Element, type=CPS6M
1, 30, 16, 13, 39, 38, 37
2,  1, 13, 16, 36, 38, 40
3, 14, 30,  2, 44, 43, 42
4, 13,  2, 30, 41, 43, 37
5, 15,  4, 30, 47, 46, 45
6, 16, 30,  4, 39, 46, 48
7,  3, 15, 14, 51, 50, 49
8, 30, 14, 15, 44, 50, 45
 9, 31, 20, 17, 55, 54, 53
10,  5, 17, 20, 52, 54, 56
11, 18, 31,  6, 60, 59, 58
12, 17,  6, 31, 57, 59, 53
13, 19,  8, 31, 63, 62, 61
14, 20, 31,  8, 55, 62, 64
15,  7, 19, 18, 67, 66, 65
16, 31, 18, 19, 60, 66, 61
17,  9, 21, 23, 68, 69, 70
18, 21, 32, 23, 71, 72, 69
19, 21,  1, 32, 73, 74, 71
20,  1, 16, 32, 40, 75, 74
21, 23, 32, 10, 72, 76, 77
22, 32, 22, 10, 78, 79, 76
23, 32, 16, 22, 75, 80, 78
24, 16,  4, 22, 48, 81, 80
25, 11, 24, 26, 82, 83, 84
26, 24, 33, 26, 85, 86, 83
27, 24,  6, 33, 87, 88, 85
28,  6, 25, 33, 89, 90, 88
29, 26, 33,  9, 86, 91, 92
30, 33, 21,  9, 93, 68, 91
31, 33, 25, 21, 90, 94, 93
32, 25,  1, 21, 95, 73, 94
33,   6,  24,  18,  87,  96,  58
34,  24,  34,  18,  97,  98,  96
35,  24,  11,  34,  82,  99,  97
36,  11,  27,  34, 100, 101,  99
37,  18,  34,   7,  98, 102,  65
38,  34,  28,   7, 103, 104, 102
39,  34,  27,  28, 101, 105, 103
40,  27,  12,  28, 106, 107, 105
41,  35,  25,  17, 110, 109, 108
42,   6,  17,  25,  57, 109,  89
43,  29,  35,   5, 113, 112, 111
44,  17,   5,  35,  52, 112, 108
45,  13,   1,  35,  36, 115, 114
46,  25,  35,   1, 110, 115,  95
47,   2,  13,  29,  41, 117, 116
48,  35,  29,  13, 113, 117, 114
*Nset, nset=Part-1-1_Set-2, generate
   1,  117,    1
*Elset, elset=Part-1-1_Set-2, generate
  1,  48,   1
** Section: Section-1
*Solid Section, elset=Part-1-1_Set-2, material=Material-1
0.1,
*System
*Nset, nset=Set-1
   7,   8,  12,  19,  28,  63,  67, 104, 107
*Elset, elset=Set-1
 13, 15, 38, 40
*Nset, nset=Set-2
  3,  4, 10, 15, 22, 47, 51, 79, 81
*Elset, elset=Set-2
  5,  7, 22, 24
*Elset, elset=_Surf-1_S3, generate
 17,  29,   4
*Elset, elset=_Surf-1_S1
 36, 40
*Surface, type=ELEMENT, name=Surf-1
_Surf-1_S3, S3
_Surf-1_S1, S1
**
** MATERIALS
**
*Material, name=Material-1
*Elastic
210000., 0.3
** ----------------------------------------------------------------
**
** STEP: Step-1
**
*Step, name=Step-1, nlgeom=NO
*Static
1., 1., 1e-05, 1.
**
** BOUNDARY CONDITIONS
**
** Name: BC-1 Type: Displacement/Rotation
*Boundary
Set-1, 1, 1
** Name: BC-2 Type: Displacement/Rotation
*Boundary
Set-2, 2, 2
**
** LOADS
**
** Name: Load-1   Type: Pressure
*Dsload
Surf-1, P, -10.
**
** OUTPUT REQUESTS
**
*Restart, write, frequency=0
*NODE PRINT, NSET=Nall
U
*EL PRINT, ELSET=Eall
S
*NODE FILE
U
*EL FILE
S
*End Step
