*Heading
** Job name: fCPS8 Model name: fine_CPS8
** Generated by: Abaqus/CAE Student Edition 2021
*Preprint, echo=NO, model=NO, history=NO, contact=NO
** ----------------------------------------------------------------
**
** PART INSTANCE: Part-1-1
**
*Node
      1,   2.12968779,  0.748563945
      2,   1.78302097,  0.453000009
      3,           2.,           0.
      4,   2.41700006,           0.
      5,   1.16499996,  0.812830687
      6,   1.36939037,   1.30441773
      7,           0.,   1.58299994
      8,           0.,           1.
      9,   2.83276558,   1.34800005
     10,         3.25,           0.
     11,   1.78299999,   2.29920578
     12,           0.,         2.75
     13,   1.95635438,  0.600781977
     14,   1.93760836,   0.24782756
     15,   2.20849991,           0.
     16,   2.33895946,  0.399010003
     17,   1.26719522,   1.05862427
     18,  0.699454725,   1.51526558
     19,           0.,   1.29149997
     20,  0.590530932,  0.955415249
     21,   2.48122668,   1.04828203
     22,   2.83349991,           0.
     23,   3.14145494,  0.704780996
     24,   1.57619524,   1.80181181
     25,   1.78156114,   1.06977248
     26,   2.36494803,   1.88628185
     27,  0.920210361,   2.63746476
     28,           0.,   2.16650009
     29,   1.49321365,   0.66526556
     30,   2.13828373,  0.323418766
     31,  0.644992828,   1.23534048
     32,    2.7402072,  0.551895499
     33,   2.07325459,   1.47802711
     34,  0.809832573,   2.07636523
     35,   1.63738739,  0.867518961
     36,   2.04302096,  0.674672961
     37,   2.04731894,  0.462100387
     38,   2.23862171,  0.361214399
     39,   2.25020337,  0.577865005
     40,   1.86968768,  0.526890993
     41,   1.87159467,  0.352538496
     42,   2.03794599,  0.285623163
     43,   2.17339182,  0.161709383
     44,   2.31274986,           0.
     45,   2.39741039,  0.201135173
     46,   1.98434079,  0.124891631
     47,   2.10424995,           0.
     48,   1.21609759,  0.935727477
     49,  0.956094027,   1.14698243
     50,   0.61776185,   1.09537792
     51,  0.889270782,   0.89571166
     52,   1.31829286,   1.18152106
     53,   1.04687166,   1.42680883
     54,  0.672223806,   1.37530303
     55,  0.322496414,   1.26342022
     56,           0.,   1.14575005
     57,  0.298612624,  0.988790989
     58,  0.353529572,   1.56597483
     59,           0.,   1.43725002
     60,   2.65699625,   1.19814098
     61,   2.61071682,  0.800088763
     62,   2.94083118,  0.628338218
     63,   3.01119447,   1.03466594
     64,   2.30545712,  0.898422956
     65,   2.53958321,  0.475452751
     66,   2.78685355,   0.27594775
     67,   3.04174995,           0.
     68,   3.22274947,  0.355370194
     69,   2.62524986,           0.
     70,   1.67959762,   2.05050874
     71,   1.82472491,   1.63991952
     72,   2.21910143,   1.68215442
     73,   2.08827782,   2.10717726
     74,   1.47279274,   1.55311477
     75,   1.58562696,   1.19474387
     76,   1.92740786,   1.27389979
     77,   2.27724075,   1.26315451
     78,   2.61824918,   1.62920785
     79,   1.97093856,   0.91628772
     80,   1.19301391,   1.93908858
     81,  0.754643679,   1.79581547
     82,   1.36630476,   2.49518013
     83,  0.865021467,     2.356915
     84,  0.404916286,   2.12143278
     85,           0.,   1.87475002
     86,  0.464885771,    2.7217207
     87,           0.,   2.45825005
     88,   1.45229125,  0.963071585
     89,   1.70947433,  0.968645692
     90,   1.33727348,  0.743589222
     91,   1.56530046,  0.766392231
     92,   1.79687095,  0.734150469
     93,   1.65181267,  0.563807368
*Element, type=CPS8R
1,  1, 13, 30, 16, 36, 37, 38, 39
2, 13,  2, 14, 30, 40, 41, 42, 37
3, 16, 30, 15,  4, 38, 43, 44, 45
4, 30, 14,  3, 15, 42, 46, 47, 43
5,  5, 17, 31, 20, 48, 49, 50, 51
6, 17,  6, 18, 31, 52, 53, 54, 49
7, 20, 31, 19,  8, 50, 55, 56, 57
8, 31, 18,  7, 19, 54, 58, 59, 55
 9,  9, 21, 32, 23, 60, 61, 62, 63
10, 21,  1, 16, 32, 64, 39, 65, 61
11, 23, 32, 22, 10, 62, 66, 67, 68
12, 32, 16,  4, 22, 65, 45, 69, 66
13, 11, 24, 33, 26, 70, 71, 72, 73
14, 24,  6, 25, 33, 74, 75, 76, 71
15, 26, 33, 21,  9, 72, 77, 60, 78
16, 33, 25,  1, 21, 76, 79, 64, 77
17,  6, 24, 34, 18, 74, 80, 81, 53
18, 24, 11, 27, 34, 70, 82, 83, 80
19, 18, 34, 28,  7, 81, 84, 85, 58
20, 34, 27, 12, 28, 83, 86, 87, 84
21,  6, 17, 35, 25, 52, 88, 89, 75
22, 17,  5, 29, 35, 48, 90, 91, 88
23, 25, 35, 13,  1, 89, 92, 36, 79
24, 35, 29,  2, 13, 91, 93, 40, 92
*Nset, nset=Part-1-1_Set-2, generate
  1,  93,   1
*Elset, elset=Part-1-1_Set-2, generate
  1,  24,   1
** Section: Section-1
*Solid Section, elset=Part-1-1_Set-2, material=Material-1
0.1,
*System
*Nset, nset=Set-1
  7,  8, 12, 19, 28, 56, 59, 85, 87
*Elset, elset=Set-1
  7,  8, 19, 20
*Nset, nset=Set-2
  3,  4, 10, 15, 22, 44, 47, 67, 69
*Elset, elset=Set-2
  3,  4, 11, 12
*Elset, elset=_Surf-1_S4, generate
  9,  15,   2
*Elset, elset=_Surf-1_S2
 18, 20
*Surface, type=ELEMENT, name=Surf-1
_Surf-1_S4, S4
_Surf-1_S2, S2
**
** MATERIALS
**
*Material, name=Material-1
*Elastic
210000., 0.3
** ----------------------------------------------------------------
**
** STEP: Step-1
**
*Step, name=Step-1, nlgeom=NO
*Static
1., 1., 1e-05, 1.
**
** BOUNDARY CONDITIONS
**
** Name: BC-1 Type: �ψ�/��]
*Boundary
Set-1, 1, 1
** Name: BC-2 Type: �ψ�/��]
*Boundary
Set-2, 2, 2
**
** LOADS
**
** Name: Load-1   Type: Pressure
*Dsload
Surf-1, P, -10.
**
** OUTPUT REQUESTS
**
*Restart, write, frequency=0
*NODE PRINT, NSET=Nall
U
*EL PRINT, ELSET=Eall
S
*NODE FILE
U
*EL FILE
S
*End Step
