*Heading
**
*Node
      1,   2.12968779,  0.748563945,  0.300000012
      2,   2.41700006,           0.,  0.300000012
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*Element, type=C3D20
1,  8,  5,  6,  7,  1,  2,  3,  4, 40, 39, 38, 37, 41, 42, 43,
   44, 46, 45, 47, 48
2, 14, 12, 13,  8,  9, 10, 11,  1, 52, 51, 50, 49, 53, 54, 55,
   56, 58, 57, 59, 46
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*Nset, nset=Part-1-1_Set-4, generate
   1,  111,    1
*Elset, elset=Part-1-1_Set-4, generate
  1,  12,   1
**
*Solid Section, elset=Part-1-1_Set-4, material=Material-1
,
*System
*Nset, nset=Fixxy
   3,   4,   6,   7,  15,  16
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*Elset, elset=Fixxy
  1,  3,  5,  6,  8, 10
*Nset, nset=fixx
  17,  18,  19,  20,  21,  22
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*Elset, elset=fixx
  4,  5,  9, 10
*Nset, nset=fixy
   2,   3,   5,   6,  24,  25
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*Elset, elset=fixy
  1,  6, 11, 12
*Nset, nset=halfz
  3,  4, 15, 21, 43, 62, 75
*Elset, elset=halfz
  1,  3,  5,  6,  8, 10
*Elset, elset=_Surf-1_S2, generate
  6,  10,   1
*Elset, elset=_Surf-1_S5
 12,
*Surface, type=ELEMENT, name=Surf-1
_Surf-1_S2, S2
_Surf-1_S5, S5
**
*Material, name=Material-1
*Elastic
 2.1e+11, 0.3
**
*Step, name=Step-1, nlgeom=NO
*Static
1., 1., 1e-05, 1.
**
*Boundary
fixy, 2, 2
**
*Boundary
fixx, 1, 1
**
*Boundary
Fixxy, 1, 1
Fixxy, 2, 2
**
*Boundary
halfz, 3, 3
**
*Dsload
Surf-1, P, 1e+06
**
*Restart, write, frequency=0
*NODE PRINT, NSET=Nall
U
*EL PRINT, ELSET=Eall
S
*NODE FILE
U
*EL FILE
S
*End Step
