*Heading
**
*Node
      1,   2.12968779,  0.748563945,  0.300000012
      2,   2.41700006,           0.,  0.300000012
      3,         3.25,           0.,  0.300000012
      4,   2.83276558,   1.34800005,  0.300000012
      5,   2.41700006,           0.,           0.
      6,         3.25,           0.,           0.
      7,   2.83276558,   1.34800005,           0.
      8,   2.12968779,  0.748563945,           0.
      9,   1.36939037,   1.30441773,  0.300000012
     10,   1.16499996,  0.812830687,  0.300000012
     11,   1.78302097,  0.453000009,  0.300000012
     12,   1.16499996,  0.812830687,           0.
     13,   1.78302097,  0.453000009,           0.
     14,   1.36939037,   1.30441773,           0.
     15,   1.78299999,   2.29920578,  0.300000012
     16,   1.78299999,   2.29920578,           0.
     17,           0.,   1.58299994,  0.300000012
     18,           0.,           1.,  0.300000012
     19,           0.,   1.58299994,           0.
     20,           0.,           1.,           0.
     21,           0.,         2.75,  0.300000012
     22,           0.,         2.75,           0.
     23,   2.12968779,  0.748563945,  0.600000024
     24,   2.41700006,           0.,  0.600000024
     25,         3.25,           0.,  0.600000024
     26,   2.83276558,   1.34800005,  0.600000024
     27,   1.36939037,   1.30441773,  0.600000024
     28,   1.16499996,  0.812830687,  0.600000024
     29,   1.78302097,  0.453000009,  0.600000024
     30,   1.78299999,   2.29920578,  0.600000024
     31,           0.,   1.58299994,  0.600000024
     32,           0.,           1.,  0.600000024
     33,           0.,         2.75,  0.600000024
     34,           2.,           0.,  0.300000012
     35,           2.,           0.,           0.
     36,           2.,           0.,  0.600000024
     37,   2.48122668,   1.04828203,           0.
     38,   3.14396143,  0.696732461,           0.
     39,   2.83349991,           0.,           0.
     40,   2.34407163,  0.385926574,           0.
     41,   2.34407163,  0.385926574,  0.300000012
     42,   2.83349991,           0.,  0.300000012
     43,   3.14396143,  0.696732461,  0.300000012
     44,   2.48122668,   1.04828203,  0.300000012
     45,   2.41700006,           0.,  0.150000006
     46,   2.12968779,  0.748563945,  0.150000006
     47,         3.25,           0.,  0.150000006
     48,   2.83276558,   1.34800005,  0.150000006
     49,    1.8002671,   1.05625403,           0.
     50,   1.95635438,  0.600781977,           0.
     51,   1.51729536,  0.651501119,           0.
     52,   1.26719522,   1.05862427,           0.
     53,   1.26719522,   1.05862427,  0.300000012
     54,   1.51729536,  0.651501119,  0.300000012
     55,   1.95635438,  0.600781977,  0.300000012
     56,    1.8002671,   1.05625403,  0.300000012
     57,   1.16499996,  0.812830687,  0.150000006
     58,   1.36939037,   1.30441773,  0.150000006
     59,   1.78302097,  0.453000009,  0.150000006
     60,   1.57619524,   1.80181181,           0.
     61,   2.37534261,   1.87690723,           0.
     62,   2.37534261,   1.87690723,  0.300000012
     63,   1.57619524,   1.80181181,  0.300000012
     64,   1.78299999,   2.29920578,  0.150000006
     65,  0.611832142,  0.952058494,           0.
     66,           0.,   1.29149997,           0.
     67,   0.71696496,   1.51175106,           0.
     68,   0.71696496,   1.51175106,  0.300000012
     69,           0.,   1.29149997,  0.300000012
     70,  0.611832142,  0.952058494,  0.300000012
     71,           0.,   1.58299994,  0.150000006
     72,           0.,           1.,  0.150000006
     73,           0.,   2.16650009,           0.
     74,  0.930445969,   2.63489246,           0.
     75,  0.930445969,   2.63489246,  0.300000012
     76,           0.,   2.16650009,  0.300000012
     77,           0.,         2.75,  0.150000006
     78,   2.34407163,  0.385926574,  0.600000024
     79,   2.83349991,           0.,  0.600000024
     80,   3.14396143,  0.696732461,  0.600000024
     81,   2.48122668,   1.04828203,  0.600000024
     82,   2.41700006,           0.,  0.449999988
     83,   2.12968779,  0.748563945,  0.449999988
     84,         3.25,           0.,  0.449999988
     85,   2.83276558,   1.34800005,  0.449999988
     86,   1.26719522,   1.05862427,  0.600000024
     87,   1.51729536,  0.651501119,  0.600000024
     88,   1.95635438,  0.600781977,  0.600000024
     89,    1.8002671,   1.05625403,  0.600000024
     90,   1.16499996,  0.812830687,  0.449999988
     91,   1.36939037,   1.30441773,  0.449999988
     92,   1.78302097,  0.453000009,  0.449999988
     93,   2.37534261,   1.87690723,  0.600000024
     94,   1.57619524,   1.80181181,  0.600000024
     95,   1.78299999,   2.29920578,  0.449999988
     96,   0.71696496,   1.51175106,  0.600000024
     97,           0.,   1.29149997,  0.600000024
     98,  0.611832142,  0.952058494,  0.600000024
     99,           0.,   1.58299994,  0.449999988
    100,           0.,           1.,  0.449999988
    101,  0.930445969,   2.63489246,  0.600000024
    102,           0.,   2.16650009,  0.600000024
    103,           0.,         2.75,  0.449999988
    104,   1.94499898,     0.232905,           0.
    105,           2.,           0.,  0.150000006
    106,   1.94499898,     0.232905,  0.300000012
    107,   2.20849991,           0.,  0.300000012
    108,   2.20849991,           0.,           0.
    109,           2.,           0.,  0.449999988
    110,   1.94499898,     0.232905,  0.600000024
    111,   2.20849991,           0.,  0.600000024
*Element, type=C3D20R
1,  8,  5,  6,  7,  1,  2,  3,  4, 40, 39, 38, 37, 41, 42, 43,
   44, 46, 45, 47, 48
2, 14, 12, 13,  8,  9, 10, 11,  1, 52, 51, 50, 49, 53, 54, 55,
   56, 58, 57, 59, 46
3, 14,  8,  7, 16,  9,  1,  4, 15, 49, 37, 61, 60, 56, 44, 62,
   63, 58, 46, 48, 64
4, 14, 19, 20, 12,  9, 17, 18, 10, 67, 66, 65, 52, 68, 69, 70,
   53, 58, 71, 72, 57
5, 19, 14, 16, 22, 17,  9, 15, 21, 67, 60, 74, 73, 68, 63, 75,
   76, 71, 58, 64, 77
6,  1,  2,  3,  4, 23, 24, 25, 26, 41, 42, 43, 44, 78, 79, 80,
   81, 83, 82, 84, 85
7,  9, 10, 11,  1, 27, 28, 29, 23, 53, 54, 55, 56, 86, 87, 88,
   89, 91, 90, 92, 83
8,  9,  1,  4, 15, 27, 23, 26, 30, 56, 44, 62, 63, 89, 81, 93,
   94, 91, 83, 85, 95
 9,   9,  17,  18,  10,  27,  31,  32,  28,  68,  69,  70,  53,  96,  97,  98,
     86,  91,  99, 100,  90
10,  17,   9,  15,  21,  31,  27,  30,  33,  68,  63,  75,  76,  96,  94, 101,
    102,  99,  91,  95, 103
11,  11,  34,  35,  13,   1,   2,   5,   8, 106, 105, 104,  59,  41,  45,  40,
     46,  55, 107, 108,  50
12,  34,  11,  29,  36,   2,   1,  23,  24, 106,  92, 110, 109,  41,  83,  78,
     82, 107,  55,  88, 111
*Nset, nset=Part-1-1_Set-4, generate
   1,  111,    1
*Elset, elset=Part-1-1_Set-4, generate
  1,  12,   1
**
*Solid Section, elset=Part-1-1_Set-4, material=Material-1
,
*System
*Nset, nset=Fixxy
   3,   4,   6,   7,  15,  16,  21,  22,  25,  26,  30,  33,  38,  43,  47,  48
  61,  62,  64,  74,  75,  77,  80,  84,  85,  93,  95, 101, 103
*Elset, elset=Fixxy
  1,  3,  5,  6,  8, 10
*Nset, nset=fixx
  17,  18,  19,  20,  21,  22,  31,  32,  33,  66,  69,  71,  72,  73,  76,  77
  97,  99, 100, 102, 103
*Elset, elset=fixx
  4,  5,  9, 10
*Nset, nset=fixy
   2,   3,   5,   6,  24,  25,  34,  35,  36,  39,  42,  45,  47,  79,  82,  84
 105, 107, 108, 109, 111
*Elset, elset=fixy
  1,  6, 11, 12
*Nset, nset=halfz
  3,  4, 15, 21, 43, 62, 75
*Elset, elset=halfz
  1,  3,  5,  6,  8, 10
*Elset, elset=_Surf-1_S2, generate
  6,  10,   1
*Elset, elset=_Surf-1_S5
 12,
*Surface, type=ELEMENT, name=Surf-1
_Surf-1_S2, S2
_Surf-1_S5, S5
**
*Material, name=Material-1
*Elastic
 2.1e+11, 0.3
**
*Step, name=Step-1, nlgeom=NO
*Static
1., 1., 1e-05, 1.
**
*Boundary
fixy, 2, 2
**
*Boundary
fixx, 1, 1
**
*Boundary
Fixxy, 1, 1
Fixxy, 2, 2
**
*Boundary
halfz, 3, 3
**
*Dsload
Surf-1, P, 1e+06
**
*Restart, write, frequency=0
*NODE PRINT, NSET=Nall
U
*EL PRINT, ELSET=Eall
S
*NODE FILE
U
*EL FILE
S
*End Step
