*Heading
**
*Node
      1,   2.12968779,  0.748563945,  0.300000012
      2,   2.41700006,           0.,  0.300000012
      3,         3.25,           0.,  0.300000012
      4,   2.83276558,   1.34800005,  0.300000012
      5,   2.41700006,           0.,           0.
      6,         3.25,           0.,           0.
      7,   2.83276558,   1.34800005,           0.
      8,   2.12968779,  0.748563945,           0.
      9,   1.36939037,   1.30441773,  0.300000012
     10,   1.16499996,  0.812830687,  0.300000012
     11,   1.78302097,  0.453000009,  0.300000012
     12,   1.16499996,  0.812830687,           0.
     13,   1.78302097,  0.453000009,           0.
     14,   1.36939037,   1.30441773,           0.
     15,   1.78299999,   2.29920578,  0.300000012
     16,   1.78299999,   2.29920578,           0.
     17,           0.,   1.58299994,  0.300000012
     18,           0.,           1.,  0.300000012
     19,           0.,   1.58299994,           0.
     20,           0.,           1.,           0.
     21,           0.,         2.75,  0.300000012
     22,           0.,         2.75,           0.
     23,   2.12968779,  0.748563945,  0.600000024
     24,   2.41700006,           0.,  0.600000024
     25,         3.25,           0.,  0.600000024
     26,   2.83276558,   1.34800005,  0.600000024
     27,   1.36939037,   1.30441773,  0.600000024
     28,   1.16499996,  0.812830687,  0.600000024
     29,   1.78302097,  0.453000009,  0.600000024
     30,   1.78299999,   2.29920578,  0.600000024
     31,           0.,   1.58299994,  0.600000024
     32,           0.,           1.,  0.600000024
     33,           0.,         2.75,  0.600000024
     34,           2.,           0.,  0.300000012
     35,           2.,           0.,           0.
     36,           2.,           0.,  0.600000024
     37,   2.33895946,  0.399010003,  0.300000012
     38,   2.83349991,           0.,  0.300000012
     39,   3.14145494,  0.704780996,  0.300000012
     40,   2.48122668,   1.04828203,  0.300000012
     41,   2.33895946,  0.399010003,           0.
     42,   2.83349991,           0.,           0.
     43,   3.14145494,  0.704780996,           0.
     44,   2.48122668,   1.04828203,           0.
     45,   1.26719522,   1.05862427,  0.300000012
     46,   1.49321365,   0.66526556,  0.300000012
     47,   1.95635438,  0.600781977,  0.300000012
     48,   1.78156114,   1.06977248,  0.300000012
     49,   1.26719522,   1.05862427,           0.
     50,   1.49321365,   0.66526556,           0.
     51,   1.95635438,  0.600781977,           0.
     52,   1.78156114,   1.06977248,           0.
     53,   2.36494803,   1.88628185,  0.300000012
     54,   1.57619524,   1.80181181,  0.300000012
     55,   2.36494803,   1.88628185,           0.
     56,   1.57619524,   1.80181181,           0.
     57,  0.699454725,   1.51526558,  0.300000012
     58,           0.,   1.29149997,  0.300000012
     59,  0.590530932,  0.955415249,  0.300000012
     60,  0.699454725,   1.51526558,           0.
     61,           0.,   1.29149997,           0.
     62,  0.590530932,  0.955415249,           0.
     63,  0.920210361,   2.63746476,  0.300000012
     64,           0.,   2.16650009,  0.300000012
     65,  0.920210361,   2.63746476,           0.
     66,           0.,   2.16650009,           0.
     67,   2.33895946,  0.399010003,  0.600000024
     68,   2.83349991,           0.,  0.600000024
     69,   3.14145494,  0.704780996,  0.600000024
     70,   2.48122668,   1.04828203,  0.600000024
     71,   1.26719522,   1.05862427,  0.600000024
     72,   1.49321365,   0.66526556,  0.600000024
     73,   1.95635438,  0.600781977,  0.600000024
     74,   1.78156114,   1.06977248,  0.600000024
     75,   2.36494803,   1.88628185,  0.600000024
     76,   1.57619524,   1.80181181,  0.600000024
     77,  0.699454725,   1.51526558,  0.600000024
     78,           0.,   1.29149997,  0.600000024
     79,  0.590530932,  0.955415249,  0.600000024
     80,  0.920210361,   2.63746476,  0.600000024
     81,           0.,   2.16650009,  0.600000024
     82,   1.93760836,   0.24782756,  0.300000012
     83,   1.93760836,   0.24782756,           0.
     84,   2.20849991,           0.,           0.
     85,   2.20849991,           0.,  0.300000012
     86,   1.93760836,   0.24782756,  0.600000024
     87,   2.20849991,           0.,  0.600000024
     88,    2.7402072,  0.551895499,  0.300000012
     89,    2.7402072,  0.551895499,           0.
     90,   1.63738739,  0.867518961,  0.300000012
     91,   1.63738739,  0.867518961,           0.
     92,   2.07325459,   1.47802711,  0.300000012
     93,   2.07325459,   1.47802711,           0.
     94,  0.644992828,   1.23534048,  0.300000012
     95,  0.644992828,   1.23534048,           0.
     96,  0.809832573,   2.07636523,  0.300000012
     97,  0.809832573,   2.07636523,           0.
     98,    2.7402072,  0.551895499,  0.600000024
     99,   1.63738739,  0.867518961,  0.600000024
    100,   2.07325459,   1.47802711,  0.600000024
    101,  0.644992828,   1.23534048,  0.600000024
    102,  0.809832573,   2.07636523,  0.600000024
    103,   2.13828373,  0.323418766,  0.300000012
    104,   2.13828373,  0.323418766,           0.
    105,   2.13828373,  0.323418766,  0.600000024
*Element, type=C3D8I
1,  8, 41, 89, 44,  1, 37, 88, 40
2, 41,  5, 42, 89, 37,  2, 38, 88
3, 44, 89, 43,  7, 40, 88, 39,  4
4, 89, 42,  6, 43, 88, 38,  3, 39
5, 14, 49, 91, 52,  9, 45, 90, 48
6, 49, 12, 50, 91, 45, 10, 46, 90
7, 52, 91, 51,  8, 48, 90, 47,  1
8, 91, 50, 13, 51, 90, 46, 11, 47
 9, 14, 52, 93, 56,  9, 48, 92, 54
10, 52,  8, 44, 93, 48,  1, 40, 92
11, 56, 93, 55, 16, 54, 92, 53, 15
12, 93, 44,  7, 55, 92, 40,  4, 53
13, 14, 60, 95, 49,  9, 57, 94, 45
14, 60, 19, 61, 95, 57, 17, 58, 94
15, 49, 95, 62, 12, 45, 94, 59, 10
16, 95, 61, 20, 62, 94, 58, 18, 59
17, 19, 60, 97, 66, 17, 57, 96, 64
18, 60, 14, 56, 97, 57,  9, 54, 96
19, 66, 97, 65, 22, 64, 96, 63, 21
20, 97, 56, 16, 65, 96, 54, 15, 63
21,  1, 37, 88, 40, 23, 67, 98, 70
22, 37,  2, 38, 88, 67, 24, 68, 98
23, 40, 88, 39,  4, 70, 98, 69, 26
24, 88, 38,  3, 39, 98, 68, 25, 69
25,  9, 45, 90, 48, 27, 71, 99, 74
26, 45, 10, 46, 90, 71, 28, 72, 99
27, 48, 90, 47,  1, 74, 99, 73, 23
28, 90, 46, 11, 47, 99, 72, 29, 73
29,   9,  48,  92,  54,  27,  74, 100,  76
30,  48,   1,  40,  92,  74,  23,  70, 100
31,  54,  92,  53,  15,  76, 100,  75,  30
32,  92,  40,   4,  53, 100,  70,  26,  75
33,   9,  57,  94,  45,  27,  77, 101,  71
34,  57,  17,  58,  94,  77,  31,  78, 101
35,  45,  94,  59,  10,  71, 101,  79,  28
36,  94,  58,  18,  59, 101,  78,  32,  79
37,  17,  57,  96,  64,  31,  77, 102,  81
38,  57,   9,  54,  96,  77,  27,  76, 102
39,  64,  96,  63,  21,  81, 102,  80,  33
40,  96,  54,  15,  63, 102,  76,  30,  80
41,  47, 103, 104,  51,   1,  37,  41,   8
42, 103,  85,  84, 104,  37,   2,   5,  41
43,  11,  82,  83,  13,  47, 103, 104,  51
44,  82,  34,  35,  83, 103,  85,  84, 104
45,  85, 103, 105,  87,   2,  37,  67,  24
46, 103,  47,  73, 105,  37,   1,  23,  67
47,  34,  82,  86,  36,  85, 103, 105,  87
48,  82,  11,  29,  86, 103,  47,  73, 105
*Nset, nset=Part-1-1_Set-4, generate
   1,  105,    1
*Elset, elset=Part-1-1_Set-4, generate
  1,  48,   1
**
*Solid Section, elset=Part-1-1_Set-4, material=Material-1
,
*System
*Nset, nset=Fixxy
  3,  4,  6,  7, 15, 16, 21, 22, 25, 26, 30, 33, 39, 43, 53, 55
 63, 65, 69, 75, 80
*Elset, elset=Fixxy
  3,  4, 11, 12, 19, 20, 23, 24, 31, 32, 39, 40
*Nset, nset=fixx
 17, 18, 19, 20, 21, 22, 31, 32, 33, 58, 61, 64, 66, 78, 81
*Elset, elset=fixx
 14, 16, 17, 19, 34, 36, 37, 39
*Nset, nset=fixy
  2,  3,  5,  6, 24, 25, 34, 35, 36, 38, 42, 68, 84, 85, 87
*Elset, elset=fixy
  2,  4, 22, 24, 42, 44, 45, 47
*Nset, nset=halfz
  3,  4, 15, 21, 39, 53, 63
*Elset, elset=halfz
  3,  4, 11, 12, 19, 20, 23, 24, 31, 32, 39, 40
*Elset, elset=_Surf-1_S2, generate
 21,  40,   1
*Elset, elset=_Surf-1_S5, generate
 45,  48,   1
*Surface, type=ELEMENT, name=Surf-1
_Surf-1_S2, S2
_Surf-1_S5, S5
**
*Material, name=Material-1
*Elastic
 2.1e+11, 0.3
**
*Step, name=Step-1, nlgeom=NO
*Static
1., 1., 1e-05, 1.
**
*Boundary
fixy, 2, 2
**
*Boundary
fixx, 1, 1
**
*Boundary
Fixxy, 1, 1
Fixxy, 2, 2
**
*Boundary
halfz, 3, 3
**
*Dsload
Surf-1, P, 1e+06
**
*Restart, write, frequency=0
*NODE PRINT, NSET=Nall
U
*EL PRINT, ELSET=Eall
S
*NODE FILE
U
*EL FILE
S
*End Step
